*Material, name=DOMEX_S355
*Density
7.800000e-09
*Elastic
210000,3.000000e-01
*Plastic
   404,     0
   404,1.000000e-03
   404,2.000000e-03
   404,3.000000e-03
   404,4.000000e-03
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7.719776e+02,     1
*Damage Initiation, criterion=DUCTILE
  1000,-6.700000e-01
2.483819e+01,-3.300000e-01
7.652692e+00,-3.200000e-01
4.769539e+00,-3.100000e-01
3.533724e+00,-3.000000e-01
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3.268024e-01,6.600000e-01
*Damage Evolution, type=DISPLACEMENT
1.000000e-03,
